*Heading
** Job name: 5tt Model name: Test_v1
** Generated by: Abaqus/CAE 2021
*Preprint, echo=NO, model=NO, history=NO, contact=NO
**
** PARTS
**
*Part, name=Roll
*End Part
**
*Part, name=Sheet
*Node
      1,          -1.,           2.
      2,  -1.39999998,           2.
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*Element, type=CPE4R
   1,    1,    2,  378,  377
   2,    2,    3,  379,  378
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*Nset, nset=Set-3, generate
    1,  2256,     1
*Elset, elset=Set-3, generate
    1,  1875,     1
*Nset, nset=Set-4, generate
    1,  2256,     1
*Elset, elset=Set-4, generate
    1,  1875,     1
*Nset, nset=Set-16, generate
    1,  2256,     1
*Elset, elset=Set-16, generate
    1,  1875,     1
*Nset, nset=Set-17, generate
    1,  2256,     1
*Elset, elset=Set-17, generate
    1,  1875,     1
*Nset, nset=Set-36, generate
    1,  2256,     1
*Elset, elset=Set-36, generate
    1,  1875,     1
*Nset, nset=Set-37, generate
    1,  2256,     1
*Elset, elset=Set-37, generate
    1,  1875,     1
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*Elset, elset=Set-41, generate
    1,  1875,     1
** Section: DC04
*Solid Section, elset=Set-41, material=DC04
,
*End Part
**
**
** ASSEMBLY
**
*Assembly, name=Assembly
**
*Instance, name=Roll-1, part=Roll
          0.,           2.,           0.
*Node
      1,           0.,   257.450012,           0.
*Nset, nset=Roll-1-RefPt_, internal
1,
*Surface, type=SEGMENTS, name=master_roller
START,      -257.45,       257.45
 CIRCL, 4.29023750838658, 514.864250503195,           0.,       257.45
 CIRCL,       257.45,       257.45,           0.,       257.45
 CIRCL, 22.4382459703845, 0.979674976280077,           0.,       257.45
 CIRCL,      -257.45,       257.45,           0.,       257.45
*Rigid Body, ref node=Roll-1-RefPt_, analytical surface=master_roller
*End Instance
**
*Instance, name=Sheet-1, part=Sheet
         31.,           0.,           0.
*End Instance
**
*Nset, nset=Set-1, instance=Roll-1
 1,
*Nset, nset=Set-4, instance=Roll-1
 1,
*Nset, nset=Set-6, instance=Sheet-1, generate
 1881,  2256,     1
*Elset, elset=Set-6, instance=Sheet-1, generate
 1501,  1875,     1
*Nset, nset=Set-9, instance=Sheet-1, generate
 1881,  2256,     1
*Elset, elset=Set-9, instance=Sheet-1, generate
 1501,  1875,     1
*Nset, nset=Set-10, instance=Roll-1
 1,
*Nset, nset=Set-11, instance=Roll-1
 1,
*Nset, nset=roller_Refpt, instance=Roll-1
 1,
*Elset, elset=_slave_sheet_S1, internal, instance=Sheet-1, generate
   1,  375,    1
*Surface, type=ELEMENT, name=slave_sheet
_slave_sheet_S1, S1
*End Assembly
*Amplitude, name=RollSmoothly, definition=SMOOTH STEP
             0.,              0.,            0.05,              1.
**
** MATERIALS
**
*Material, name=DC04
*Density
 7.8313e-06,
*Elastic
206300., 0.3
*Plastic
   477.2,   0.
 508.148,  0.2
 518.504, 0.23
 527.767, 0.26
  536.16, 0.29
 543.843, 0.32
 550.934, 0.35
 557.525, 0.38
 561.676,  0.4
 567.583, 0.43
 573.147, 0.46
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 650.252,  1.1
**
** INTERACTION PROPERTIES
**
*Surface Interaction, name=mu0pt05
*Friction
 0.05,
*Surface Behavior, pressure-overclosure=HARD
*Surface Interaction, name=mu0pt1
*Friction
 0.1,
*Surface Behavior, pressure-overclosure=HARD
*Time Points, name=TimePoints-1, GENERATE
0.081, 0.1, 0.001
**
** BOUNDARY CONDITIONS
**
** Name: FixRoller_andRotate Type: Velocity/Angular velocity
*Boundary, type=VELOCITY
Set-11, 1, 1
Set-11, 2, 2
Set-11, 6, 6
** Name: Symmetry Type: Symmetry/Antisymmetry/Encastre
*Boundary
Set-9, YSYMM
** ----------------------------------------------------------------
**
** STEP: Bite
**
*Step, name=Bite, nlgeom=YES
*Dynamic, Explicit
, 1.
*Bulk Viscosity
0.06, 1.2
**
** BOUNDARY CONDITIONS
**
** Name: FixRoller_andRotate Type: Velocity/Angular velocity
*Boundary, type=VELOCITY
Set-11, 2, 2, -0.5
**
** INTERACTIONS
**
** Interaction: Sheet roller
*Contact Pair, interaction=mu0pt1, mechanical constraint=KINEMATIC, cpset="Sheet roller"
Roll-1.master_roller, slave_sheet
**
** OUTPUT REQUESTS
**
*Restart, write, number interval=1, time marks=NO
**
** FIELD OUTPUT: F-Output-1
**
*Output, field
*Node Output
A, RF, U, V
*Element Output, directions=YES
LE, PE, PEEQ, S
*Contact Output
CSTRESS,
**
** HISTORY OUTPUT: RollForceTorque
**
*Output, history
*Node Output, nset=roller_Refpt
RF2, RM3
**
** HISTORY OUTPUT: energy_wholeModel
**
*Output, history, variable=PRESELECT
*End Step
** ----------------------------------------------------------------
**
** STEP: Roll
**
*Step, name=Roll, nlgeom=YES
*Dynamic, Explicit
, 0.1
*Bulk Viscosity
0.06, 1.2
**
** BOUNDARY CONDITIONS
**
** Name: FixRoller_andRotate Type: Velocity/Angular velocity
*Boundary, amplitude=RollSmoothly, type=VELOCITY
Set-11, 1, 1
Set-11, 2, 2
Set-11, 6, 6, 5.
**
** OUTPUT REQUESTS
**
*Restart, write, number interval=1, time marks=NO
**
** FIELD OUTPUT: F-Output-1
**
*Output, field
*Node Output
A, RF, U, V
*Element Output, directions=YES
LE, PE, PEEQ, S
*Contact Output
CSTRESS,
**
** HISTORY OUTPUT: RollForceTorque
**
*Output, history
*Node Output, nset=roller_Refpt
RF2, RM3
**
** HISTORY OUTPUT: energy_wholeModel
**
*Output, history, variable=PRESELECT
*End Step
