*Heading
** Job name: 20tt_CPE4R Model name: Test_v1
** Generated by: Abaqus/CAE 2021
*Preprint, echo=NO, model=NO, history=NO, contact=NO
**
** PARTS
**
*Part, name=Roll
*End Part
**
*Part, name=Sheet
*Node
      1,          -1.,           2.
      2,  -1.10000002,           2.
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*Element, type=CPE4R
    1,     1,     2,  1503,  1502
    2,     2,     3,  1504,  1503
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*Nset, nset=Whole_sheet, generate
     1,  31521,      1
*Elset, elset=Whole_sheet, generate
     1,  30000,      1
*Nset, nset=Bottom_sheet, generate
 30021,  31521,      1
*Elset, elset=Bottom_sheet, generate
 28501,  30000,      1
*Elset, elset=_slave_top_sheet_S1, internal, generate
    1,  1500,     1
*Surface, type=ELEMENT, name=slave_top_sheet
_slave_top_sheet_S1, S1
** Section: DC04
*Solid Section, elset=Whole_sheet, material=DC04
,
*End Part
**
**
** ASSEMBLY
**
*Assembly, name=Assembly
**
*Instance, name=Roll-1, part=Roll
          0.,      1.99999,           0.
*Node
      1,           0.,   257.450012,           0.
*Nset, nset=Roll-1-RefPt_, internal
1,
*Nset, nset=roller_RefPt
 1,
*Surface, type=SEGMENTS, name=master_roller
START,      -257.45,       257.45
 CIRCL, 4.29023750838658, 514.864250503195,           0.,       257.45
 CIRCL,       257.45,       257.45,           0.,       257.45
 CIRCL, 22.4382459703845, 0.979674976280077,           0.,       257.45
 CIRCL,      -257.45,       257.45,           0.,       257.45
*Rigid Body, ref node=Roll-1-RefPt_, analytical surface=master_roller
*End Instance
**
*Instance, name=Sheet-1, part=Sheet
         31.,           0.,           0.
*End Instance
**
*End Assembly
**
** MATERIALS
**
*Material, name=DC04
*Elastic
206300., 0.3
*Plastic
   477.2,   0.
 508.148,  0.2
 518.504, 0.23
 527.767, 0.26
  536.16, 0.29
 543.843, 0.32
 550.934, 0.35
 557.525, 0.38
 561.676,  0.4
 567.583, 0.43
 573.147, 0.46
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 650.252,  1.1
**
** INTERACTION PROPERTIES
**
*Surface Interaction, name=mu0pt05
1.,
*Friction, slip tolerance=0.005
 0.05,
*Surface Behavior, pressure-overclosure=HARD
*Surface Interaction, name=mu0pt1
1.,
*Friction, slip tolerance=0.005
 0.1,
*Surface Behavior, pressure-overclosure=HARD
*Time Points, name=TimePoints-1, GENERATE
0., 0.09975, 0.009975
0.099775, 0.1, 2.5e-05
**
** BOUNDARY CONDITIONS
**
** Name: Roll Type: Velocity/Angular velocity
*Boundary, type=VELOCITY
Roll-1.roller_RefPt, 1, 1
Roll-1.roller_RefPt, 2, 2
Roll-1.roller_RefPt, 6, 6
** Name: Symmetry Type: Symmetry/Antisymmetry/Encastre
*Boundary
Sheet-1.Bottom_sheet, YSYMM
**
** INTERACTIONS
**
** Interaction: Sheet-Roll
*Contact Pair, interaction=mu0pt1, type=SURFACE TO SURFACE, tracking=STATE
Sheet-1.slave_top_sheet, Roll-1.master_roller
** ----------------------------------------------------------------
**
** STEP: Bite
**
*Step, name=Bite, nlgeom=YES, inc=50000
*Static
0.001, 1., 1e-10, 0.2
**
** BOUNDARY CONDITIONS
**
** Name: Roll Type: Velocity/Angular velocity
*Boundary, op=NEW, type=VELOCITY
Roll-1.roller_RefPt, 1, 1
Roll-1.roller_RefPt, 2, 2, -0.5
Roll-1.roller_RefPt, 6, 6
** Name: Symmetry Type: Symmetry/Antisymmetry/Encastre
*Boundary, op=NEW
Sheet-1.Bottom_sheet, YSYMM
**
** OUTPUT REQUESTS
**
*Restart, write, frequency=0
**
** FIELD OUTPUT: F-Output-1
**
*Output, field, number interval=20
*Node Output
COORD, RF, U
*Element Output, directions=YES
LE, PEEQ, S
*Contact Output
CSTRESS,
**
** HISTORY OUTPUT: energy_wholeModel
**
*Output, history, number interval=200
*Energy Output
ALLAE, ALLIE, ALLKE, ALLPD, ALLSD, ALLSE, ALLVD, ALLWK, ETOTAL
**
** HISTORY OUTPUT: roller_refPt_force_torque
**
*Node Output, nset=Roll-1.roller_RefPt
RF2, RM3
*End Step
** ----------------------------------------------------------------
**
** STEP: Roll
**
*Step, name=Roll, nlgeom=YES, inc=120000
*Static
0.001, 0.1, 1e-08, 0.005
**
** BOUNDARY CONDITIONS
**
** Name: Roll Type: Velocity/Angular velocity
*Boundary, op=NEW, type=VELOCITY
Roll-1.roller_RefPt, 1, 1
Roll-1.roller_RefPt, 2, 2
Roll-1.roller_RefPt, 6, 6, 5.
** Name: Symmetry Type: Symmetry/Antisymmetry/Encastre
*Boundary, op=NEW
Sheet-1.Bottom_sheet, YSYMM
**
** OUTPUT REQUESTS
**
*Restart, write, frequency=0
**
** FIELD OUTPUT: F-Output-1
**
*Output, field, time points=TimePoints-1
*Node Output
COORD, RF, U
*Element Output, directions=YES
LE, PEEQ, S
*Contact Output
CSTRESS,
**
** HISTORY OUTPUT: energy_wholeModel
**
*Output, history, number interval=200
*Energy Output
ALLAE, ALLIE, ALLKE, ALLPD, ALLSD, ALLSE, ALLVD, ALLWK, ETOTAL
**
** HISTORY OUTPUT: roller_refPt_force_torque
**
*Node Output, nset=Roll-1.roller_RefPt
RF2, RM3
*End Step
